# OpenSim document version 30000
Model ScapulothoracicJoint_Shoulder:
  length_units: meters
  force_units: N
  gravity: 0 -9.80665 0
  credits:
    Model constructed by Ricardo Matias and Ajay Seth. Scapulothoracic joint developed by Seth et al. [1]; segment dimensions and joint locations were obtained from Holzbaur et al. [2], and segment inertial properties obtained from Breteler et al. [3]
  publications:
    [1] Seth A, Matias R, Veloso A, Delp SL. A biomechanical model of the scapulothoracic joint to accurately capture scapula kinematics during shoulder movements. PLoS One. 2015.
    [2] Holzbaur KRS, Murray WM, Delp SL. A Model of the Upper Extremity for Simulating Musculoskeletal Surgery and Analyzing Neuromuscular Control. Ann Biomed Eng 33:829–840. 2005.
    [3] Breteler KMD, Spoor CW, Van der Helm FC. Measuring muscle and joint geometry parameters of a shoulder for modeling purposes. J Biomech 32:1191–7. 1999.
  BodySet:
    Body ground: mass=0 mass_center=(0 0 0) inertia_xx=0 inertia_yy=0 inertia_zz=0
    Body thorax: mass=20 mass_center=(-0.0591 -0.1486 0) inertia_xx=1.29841 inertia_yy=0.55245 inertia_zz=1.29841
        meshes=(thorax.vtp groundspine.vtp)
      CustomJoint ground_thorax: parent_body=ground location_in_parent=(0 0 0) location=(0 0 0)
        Coordinate ground_thorax_rot_x: motion_type=rotational default_value=0 range=(-1.570796 1.570796) clamped=true
            locked=true
        Coordinate ground_thorax_rot_y: motion_type=rotational default_value=0 range=(-1.570796 1.570796) clamped=true
            locked=true
        Coordinate ground_thorax_rot_z: motion_type=rotational default_value=0 range=(-1.570796 1.570796) clamped=true
            locked=true
        Coordinate ground_thorax_tx: motion_type=translational default_value=0 range=(-1 1) clamped=false locked=true
        Coordinate ground_thorax_ty: motion_type=translational default_value=0 range=(-1 1) clamped=false locked=true
        Coordinate ground_thorax_tz: motion_type=translational default_value=0 range=(-1 1) clamped=false locked=true
        SpatialTransform:
          TransformAxis rotation1: coordinates=ground_thorax_rot_x axis=(1 0 0) LinearFunction(coefficients=1 0)
          TransformAxis rotation2: coordinates=ground_thorax_rot_y axis=(0 1 0) LinearFunction(coefficients=1 0)
          TransformAxis rotation3: coordinates=ground_thorax_rot_z axis=(0 0 1) LinearFunction(coefficients=1 0)
          TransformAxis translation1: coordinates=ground_thorax_tx axis=(1 0 0) LinearFunction(coefficients=1 0)
          TransformAxis translation2: coordinates=ground_thorax_ty axis=(0 1 0) LinearFunction(coefficients=1 0)
          TransformAxis translation3: coordinates=ground_thorax_tz axis=(0 0 1) LinearFunction(coefficients=1 0)
      WrapEllipsoid ScapulothoracicEllipsoid: translation=(-0.02 -0.0173 0.0609) quadrant=all
          dimensions=(0.07 0.15 0.07)
    Body scapula: mass=0.7054 mass_center=(-0.04612 -0.0319 -0.04565) inertia_xx=0.001 inertia_yy=0.001
        inertia_zz=0.001 meshes=scapula.vtp
      ScapulothoracicJoint scapulothoracic: parent_body=thorax location_in_parent=(-0.02 -0.0173 0.07)
          orientation_in_parent=(0 -0.87 0) location=(-0.05982 -0.03904 -0.056) orientation=(-0.5181 -1.1416 -0.2854)
          thoracic_ellipsoid_radii_x_y_z=(0.07 0.15 0.07) scapula_winging_axis_origin=(0 0)
          scapula_winging_axis_direction=0 [radians]
        Coordinate scapula_abduction: motion_type=rotational default_value=0 range=(-0.7853982 0.7853982) clamped=true
        Coordinate scapula_elevation: motion_type=rotational default_value=0 range=(-0.7853982 0.7853982) clamped=true
        Coordinate scapula_upward_rot: motion_type=rotational default_value=0 range=(-0.7853982 0.7853982) clamped=true
        Coordinate scapula_winging: motion_type=rotational default_value=0 range=(-0.7853982 0.7853982) clamped=false
  MarkerSet:
    Marker ij: thorax (0 0 0)
    Marker c7: thorax (-0.0899063 0.0327569 0)
    Marker t8: thorax (-0.111155 -0.154433 0)
    Marker px: thorax (0.0697635 -0.164311 0)
    Marker ScapulaMassCenter: scapula (-0.04612 -0.0319 -0.04565)
    Marker ScapulaThoracicContactPt: scapula (-0.05982 -0.03904 -0.056)
    Marker ac: scapula (-0.0119247 -0.00196687 -0.0176399)
    Marker ai: scapula (-0.115393 -0.116437 -0.0826482)
    Marker ts: scapula (-0.0921861 -0.00870938 -0.095417)
    Marker aa: scapula (-0.044807 -4.28397e-5 0.00490913)
    Marker centijc7: thorax (-0.0415 0.0163 0)
    Marker centpxt8: thorax (-0.0207 -0.1601 0.0004)
